# NOTE: This script can be modified for different pair styles
# See in.elastic for more info.

# Choose potential

bond_style      harmonic
angle_style     hybrid fourier cosine/periodic
dihedral_style  harmonic
improper_style  fourier

pair_style      lj/cut 12.500
pair_modify     tail yes mix arithmetic
special_bonds   lj 0.0 0.0 1.0
include   	 data.pair

# Setup neighbor style
neighbor 1.0 nsq
neigh_modify once no every 1 delay 0 check yes

# Setup minimization style
min_style	     cg
min_modify	     dmax ${dmax} line quadratic

# Setup output
thermo		1
thermo_style custom step temp pe press pxx pyy pzz pxy pxz pyz lx ly lz vol
thermo_modify norm no
